*Heading
** Job name: Job-1 Model name: Model-1
** Generated by: Abaqus/CAE 2025
*Preprint, echo=NO, model=NO, history=NO, contact=NO
** ----------------------------------------------------------------
**
** PART INSTANCE: Part-1-beam-1
**
*Node
      1,         100.,          10.,          40.
      2,         100.,           8.,          40.
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*Element, type=C3D8
   1,  127,  128,  134,  133,    1,    2,    8,    7
   2,  128,  129,  135,  134,    2,    3,    9,    8
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*Nset, nset=Part-1-beam-1__PickedSet2, generate
    1,  6426,     1
*Elset, elset=Part-1-beam-1__PickedSet2, generate
    1,  5000,     1
** Section: Section-1
*Solid Section, elset=Part-1-beam-1__PickedSet2, material=Material-1
,
*System
*Nset, nset=_PickedSet4, generate
 6301,  6426,     1
*Elset, elset=_PickedSet4, generate
 4901,  5000,     1
*Elset, elset=__PickedSurf7_S6, generate
    1,  4996,     5
*Surface, type=ELEMENT, name=_PickedSurf7
__PickedSurf7_S6, S6
**
** MATERIALS
**
*Material, name=Material-1
*Density
 7.85e-09,
*Elastic
 2.1e+11, 0.3
** ----------------------------------------------------------------
**
** STEP: Step-1
**
*Step, name=Step-1, nlgeom=NO, inc=100000
*Static
0.1, 1., 1e-05, 1.
**
** BOUNDARY CONDITIONS
**
** Name: BC-1 Type: 对称/反对称/完全固定
*Boundary
_PickedSet4, ENCASTRE
**
** LOADS
**
** Name: Load-1   Type: Pressure
*Dsload
_PickedSurf7, P, 100.
**
** OUTPUT REQUESTS
**
*Restart, write, frequency=0
**
** FIELD OUTPUT: F-Output-1
**
*Output, field
*Node Output, variable=PRESELECT
*Element Output, directions=YES
E, LE, MISES, PE, PEEQ, PEMAG, S
**
** HISTORY OUTPUT: H-Output-1
**
*Output, history, variable=PRESELECT
*End Step
